A := [21.53, 14.67, -0.18; 8.54, -7.89, -14.71; 11.96, -8.05, 25.62]
B := [7.9, 21.51, -17.46; 22.07, 1.05, -1.05; 27.45, 1.54, -0.87]
V1 := [-22.36; -4.07; -36.49]
V2 := [-17.61; -16.89; 1.88]
A + B = [29.43, 36.18, -17.64; 30.61, -6.84, -15.76; 39.41, -6.51, 24.75]
V1×V2 = [-623.968; 684.626; 305.988]
V1*V2 = 393.901
A*B = [488.913, 478.237, -391.161; -510.456, 152.757, -128.026; 620.09, 288.262, -222.659]
|V1| = 42.989
|V2| = 24.4728
A*V1 = [-534.549; 377.926; -1169.54]
cos := V1*V2/(|V1|*|V2|) = 0.374408
transpose(V1)*V2 = 393.901
transpose(V1)*A*V2 = 15174.2
r := -36
eta := 0.94
fi := 4.84
sph2xyz(r, eta, fi) = [21.0597; 28.8357; -4.58154]
