X := [-2, 3, 0, -3, -2, -2, 2, 2]
x := -6, -5.9 .. 6
sin(π*x)*sqrt(|x|) = [
    0; 0.7506; 1.41557; 1.9315; 2.25061; 2.34521; 2.21006; 1.8625; 1.34036; 0.697859
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]
ratio1 := 100/12 = 8.33333
Y := [0, 0, 4, 0, 0, -4, -4, 0]
xL1 := 100
xLw := 100
xL := min(X)
xH1 := 200
xC1 := (xL1 + xH1)/2 = 150
yL1 := 800
xHw := 400
xH := max(X)
yH1 := 900
yC1 := (yL1 + yH1)/2 = 850
yLw := 200
yL := min(Y)
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yHw := 500
yH := max(Y)
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kx := (xHw - xLw)/(xH - xL) = 50
ky := (yHw - yLw)/(yH - yL) = 37.5
XW := X = [-2, 3, 0, -3, -2, -2, 2, 2]
YW := Y = [0, 0, 4, 0, 0, -4, -4, 0]
T1 := [kx, 0, yLw; 0, ky, yHw; 0, 0, 1]
M := [0; 0; 0]
V1 := [0; 0; 1]
buffer :=
    for i ∈ 0 .. 7
        V1[0, 0] ← X[0, i] - xL
        V1[1, 0] ← Y[0, i] - yL
        V1[2, 0] ← 1
        M ← T1*V1
        buffer[0, i] ← M[0, 0]
        buffer[1, i] ← M[0, 0]
        buffer[2, i] ← M[2, 0]
