# Запишем условие задания
X1 := [2; 5]
Y1 := [12; 9]  # - координаты отрезка AB
X2 := [2; 5]
Y2 := [3; 6]  # - координаты отрезка CD
# Найдем точку пересечения прямых
a1 := (Y1[1, 0] - Y1[0, 0])/(X1[1, 0] - X1[0, 0]) = -1
a2 := (Y2[1, 0] - Y2[0, 0])/(X2[1, 0] - X2[0, 0]) = 1
b1 := Y1[0, 0] - X1[0, 0]*a1 = 14
b2 := Y2[0, 0] - X2[0, 0]*a2 = 1
Px := (b2 - b1)/(a1 - a2) = 6.5
Py := a1*Px + b1 = 7.5
# Найдем новые координаты точек A,B,C,D после поворота на угол 135^о
P := [X1[0], X1[1], X2[0], X2[1]; Y1[0], Y1[1], Y2[0], Y2[1]; 1, 1, 1, 1]  # - матрица координат
Ts(dx, dy) := [1, 0, -dx; 0, 1, -dy; 0, 0, 1]  # - смещение начала системы координат
Rs(ϕ) := [cos(ϕ), -sin(ϕ), 0; sin(ϕ), cos(ϕ), 0; 0, 0, 1]  # - поворот системы координат на угол ϕ
ϕ := 135
ϕ_rad := ϕ*π/180  # - угол в радианах
# Сместим систему координат в точку Р
A := Ts(Px, Py)*P = [-4.5, -1.5, -4.5, -1.5; 4.5, 1.5, -4.5, -1.5; 1, 1, 1, 1]
# Повернем систему координат на 135 градусов
B := Rs(ϕ_rad)*A = [0, 0, 6.36396, 2.12132; -6.36396, -2.12132, 0, 0; 1, 1, 1, 1]
# Снова сместим систему координат в исходное положение
C := Ts(-Px, -Py)*B = [6.5, 6.5, 12.864, 8.62132; 1.13604, 5.37868, 7.5, 7.5; 1, 1, 1, 1]
X3 := [6.5; 6.5]
Y3 := [1.136; 5.379]
X4 := [12.864; 8.621]
Y4 := [7.5; 7.5]
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