# Уравнения прямых
A(2, 12)*и*B(5, 9)
C(2, 3)*и*D(5, 6)
x1 := 2
x2 := 5
х1 := 2
х2 := 5
y1 := 12
y2 := 9
у1 := 3
у2 := 6
a := (y2 - y1)/(x2 - x1) = -1
а := (у2 - у1)/(х2 - х1) = 1
b := x1 - a*y1 = 14
в := -х1 + а*у1 = 1
f1(x) := a*x + b
f2(x) := а*x + в
# Точка пересечения прямых
x0 := (в - b)/(a - а) = 6.5
y0 := f1(x0) = 7.5
# (6.5, 7.5) - координаты точки P в МСК
# Новые координаты точек
# Матрица поворота системы координат М:
M := [cos(π*135/180), sin(π*135/180); -sin(π*135/180), cos(π*135/180)]  # '
Ap := M*[x1 - x0; y1 - y0] + [x0; y0] = [12.864; 7.5]
A2 := □  # error: Пустой местозаполнитель.
A1 := [x1; y1] - [x0; y0] = [-4.5; 4.5]
Bp := M*[x2 - x0; y2 - y0] + [x0; y0] = [8.62132; 7.5]
B1 := [x2; y2] - [x0; y0] = [-1.5; 1.5]
Cp := M*[х1 - x0; у1 - y0] + [x0; y0] = [6.5; 13.864]
C1 := [х1; у1] - [x0; y0] = [-4.5; -4.5]
Dp := M*[х2 - x0; у2 - y0] + [x0; y0] = [6.5; 9.62132]
D1 := [х2; у2] - [x0; y0] = [-1.5; -1.5]
# График
Mabp := transpose([12.864, 8.621; 7.5, 7.5])
Mcdp := transpose([6.5, 6.5; 13.864, 9.621])
Mab := transpose([2, 5; 12, 9])
Mcd := transpose([2, 5; 3, 6])
xabp := Mabp[:, 0]
xcdp := Mcdp[:, 0]
xab := Mab[:, 0]
xcd := Mcd[:, 0]
yabp := Mabp[:, 1]
ycdp := Mcdp[:, 1]
yab := Mab[:, 1]
ycd := Mcd[:, 1]
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