# Задаем координаты вершин пирамиды и положения камеры:
PIR := [0, 0, 3, 0, 0, 1; 3, 0, 0, 1, 0, 0; 0, 0, 0, 3, 3, 3; 1, 1, 1, 1, 1, 1]
PV := [10; 315; 0]
# Получаем сферические координаты точки наблюдения:
r_v := PV[0] = 10
ϕ_v := PV[1]*π/180 = 5.49779
θ_v := PV[2]*π/180 = 0
# Задаем положение секущей плоскости в МСК XYZ
# -угол между осью z и вектором нормали к секущей плоскости
ϕ_grad := 50
ϕ := ϕ_grad/180*π
ϕ = 0.872665
PVr := [r_v; ϕ_v; θ_v] = [10; 5.49779; 0]
# - вектор нормали к секущей плоскости
N := transpose([0, sin(ϕ), cos(ϕ)])
# - координаты точки пересечения оси Z и секущей плоскости
x_0 := 0
y_0 := 0
z_0 := 3/4*PIR[:, 3][2]
z_0 = 2.25
PIR[:, 3] = [0; 1; 3; 1]
# Задаем параметры уравнения секущей плоскости
[A; B; C] := N
[A; B; C] = [0; 0.766044; 0.642788]
D := -(A*x_0 + B*y_0 + C*z_0)
D = -1.44627
# Находим точку пересечения P1 секущей плоскости с ребром AD
[x1; y1; z1] := submatrix(PIR, 0, 2, 0, 0) = [0; 3; 0]
[x2; y2; z2] := submatrix(PIR, 0, 2, 3, 3) = [0; 1; 3]
Δx := x2 - x1
Δy := y2 - y1
Δz := z2 - z1
t_AD1 := -((A*x1 + B*y1 + C*z1 + D)/(A*Δx + B*Δy + C*Δz))
# - параметр, при котором ребро и плоскость имеют общую точку. Если между 0 и 1, то ребро пересекает плоскость
t_AD := 0.3
x_AD := x1 + Δx*t_AD
y_AD := y1 + Δy*t_AD
z_AD := z1 + Δz*t_AD
x_AD = 0
y_AD = 2.4
z_AD = 0.9  # - координаты точки пересечения Р1
# Находим точку пересечения P2 секущей плоскости с ребром CF
V1 := submatrix(PIR, 0, 2, 2, 2) = [3; 0; 0]
V2 := submatrix(PIR, 0, 2, 5, 5) = [1; 0; 3]
ΔV := V2 - V1
t_CF := -((N*V1 + D)/(N*ΔV))
V_CF := V1 + ΔV*t_CF
x_CF := V_CF[0]
y_CF := V_CF[1]
z_CF := V_CF[2]  # - координаты точки пересечения Р2
# Находим точку пересечения P3 секущей плоскости с ребром BE
V1 := submatrix(PIR, 0, 2, 1, 1) = [0; 0; 0]
V2 := submatrix(PIR, 0, 2, 4, 4) = [0; 0; 3]
ΔV := V2 - V1
t_BE := -((N*V1 + D)/(N*ΔV))
V_BE := V1 + ΔV*t_BE
x_BE := V_BE[0]
y_BE := V_BE[1]
z_BE := V_BE[2]  # - координаты точки пересечения Р3
# Получаем матрицу мировых коорднат точек P1, P2, P3
TR := [x_AD, x_CF, x_BE; y_AD, y_CF, y_BE; z_AD, z_CF, z_BE; 1, 1, 1]
# Задаем область отображения графика в окне Windows
x_LW := 200
y_LW := 100  # – левый верхний угол области отображения
x_HW := 700
y_HW := 500  # – правый нижний угол области отображения
# Формируем матрицу пересчета мировых координат в видовые
# Переместить центр координат в точку наблюдения,
# повернуть систему координат так, чтобы O2Y2 был параллелен проекции OE на OXY,
# затем повернуть систему координат так, чтобы O3Y3 совпадал с O3O, но они были противонаправлены
# отразить систему координат относительно О3Y3Z3
K_view := [
    -sin(ϕ_v), cos(ϕ_v), 0, 0;
    -cos(θ_v)*cos(ϕ_v), -cos(θ_v)*sin(ϕ_v), sin(θ_v), 0;
    -sin(θ_v)*cos(ϕ_v), -sin(θ_v)*sin(ϕ_v), -cos(θ_v), r_v;
    0, 0, 0, 1
]
# Вычисляем координаты вершин пирамиды в видовой системе координат (ВСК)
PIR_V := K_view*PIR
# Вычисляем координаты вершин треугольника сечения Р1,
# Р2, Р3 в видовой системе координат (ВСК)
TR_V := K_view*TR
# Определяем координаты проекции вершин пирамиды на картинную плоскость
PIR_V = [
    2.12132, 0, 2.12132, 0.707107, 0, 0.707107;
    2.12132, 0, -2.12132, 0.707107, 0, -0.707107;
    10, 10, 10, 7, 7, 7;
    1, 1, 1, 1, 1, 1
]
P_XY := stack(transpose(transpose(PIR_V)[:, 0]), transpose(transpose(PIR_V)[:, 1]), transpose(transpose(PIR_V)[:, 3]))
# Определяем координаты проекции вершин треугольника сечения Р1,
# Р2, Р3 на картинную плоскость
P_XY = [
    2.12132, 0, 2.12132, 0.707107, 0, 0.707107;
    2.12132, 0, -2.12132, 0.707107, 0, -0.707107;
    1, 1, 1, 1, 1, 1
]
TR_XY := stack(transpose(transpose(TR_V)[:, 0]), transpose(transpose(TR_V)[:, 1]), transpose(transpose(TR_V)[:, 3]))
# Определяем габаритную область проекции пирамиды на плоскость XY ВСК – картинную плоскость
x_L := min(transpose(P_XY)[:, 0])
y_H := max(transpose(P_XY)[:, 1])
# – левый верхний угол
x_L = 0
y_H = 2.12132
x_H := max(transpose(P_XY)[:, 0])
y_L := min(transpose(P_XY)[:, 1])
# – правый нижний угол
x_H = 2.12132
y_L = -2.12132
# Вычисляем параметры, необходимые для формирования матрицы пересчета координат из плоскости XY ВСК в ОК
Δx_W := x_HW - x_LW
Δx_W = 500
Δx := x_H - x_L
Δx = 2.12132
Δy_W := y_HW - y_LW
Δy_W = 400
Δy := y_H - y_L
Δy = 4.24264
k_x := Δx_W/Δx
k_x = 235.702
k_y := Δy_W/Δy
k_y = 94.2809
T_SW := [k_x, 0, x_LW - k_x*x_L; 0, -k_y, y_HW + k_y*y_L; 0, 0, 1] = [235.702, 0, 200; 0, -94.2809, 300; 0, 0, 1]  # – матрица пересчета из ВСК в ОК
# Вычисляем оконные координаты вершин пирамиды
M_W := T_SW*P_XY
[x_a, x_b, x_c, x_d, x_e, x_f; y_a, y_b, y_c, y_d, y_e, y_f; q, q, q, q, q, q] := vectorize(round(M_W)) = [700, 200, 700, 367, 200, 367; 100, 300, 500, 233, 300, 367; 1, 1, 1, 1, 1, 1]
# Формируем массивы координат X и Y для рисования пирамиды
X := transpose([x_a, x_b, x_c, x_a, x_d, x_e, x_b, x_e, x_f, x_c, x_f, x_d])
Y := -transpose([y_a, y_b, y_c, y_a, y_d, y_e, y_b, y_e, y_f, y_c, y_f, y_d])
# Вычисляем оконные координаты вершин
# треугольника сечения Р1, Р2, Р3
TR_W := T_SW*TR_XY
[x_p1, x_p2, x_p3; y_p1, y_p2, y_p3; q, q, q] := vectorize(round(TR_W)) = [600, 450, 200; 140, 400, 300; 1, 1, 1]
X2 := transpose([x_a, x_c])
Y2 := -transpose([y_a, y_c])
# 2. без удаления невидимых граней
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# Формируем массивы координат Х и У для рисования
# сечения пирамиды
XC := transpose([x_p1, x_p2, x_p3, x_p1])
YC := -transpose([y_p1, y_p2, y_p3, y_p1])
К := [r_v*sin(θ_v)*cos(ϕ_v); r_v*sin(θ_v)*sin(θ_v); r_v*cos(θ_v)]
# 4. сечение пирамиды (без удаления невидимых граней)
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D := submatrix(PIR, 0, 2, 3, 3)
D = [0; 1; 3]
BD := B - D
BD = [0.766044; -0.233956; -2.23396]
A := submatrix(PIR, 0, 2, 0, 0)
B := submatrix(PIR, 0, 2, 1, 1)
B = [0; 0; 0]
A = [0; 3; 0]
C := submatrix(PIR, 0, 2, 2, 2)
C = [3; 0; 0]
AB := B - A
BC := C - B
Nabc := transpose(AB×BC)
Nabc = [0, 0, 9]
X := transpose([x_a, x_b, x_c, x_a, x_d, x_e, x_b, x_e, x_f, x_c, x_f, x_d])
X1 := transpose([x_e, x_b, x_c, x_f, x_e, x_d, x_f, x_c, x_a, x_d])
Y := -transpose([y_a, y_b, y_c, y_a, y_d, y_e, y_b, y_e, y_f, y_c, y_f, y_d])
К = [0; 0; 10]
Y1 := -transpose([y_e, y_b, y_c, y_f, y_e, y_d, y_f, y_c, y_a, y_d])
Q1 := K*Nabc
Q1 = [0, 0, 9] K
N_ABC := [0 - 3; 3 - 0; 0 - 0]×[0 - 0; 3 - 0; 0 - 0] = [0; 0; -9]
ABC_Visible := N_ABC*PVr = 0
[0, 0, 3, 0, 0, 1; 3, 0, 0, 1, 0, 0; 0, 0, 0, 3, 3, 3; 1, 1, 1, 1, 1, 1]
N_A1B1C1 := [0 - 0; 1 - 0; 3 - 3]×[0 - 1; 1 - 0; 3 - 3] = [0; 0; 1]
A1B1C1_Visible := N_A1B1C1*PVr = 0
N_ABA1 := [0 - 0; 3 - 1; 0 - 3]×[0 - 0; 3 - 0; 0 - 0] = [9; 0; 0]
ABA1_Visible := N_ABA1*PVr = 90
N_ACA1 := [0 - 0; 3 - 1; 0 - 3]×[0 - 3; 3 - 0; 0 - 0] = [9; 9; 6]
ACA1_Visible := N_ACA1*PVr = 139.48
N_BCB1 := [0 - 3; 0 - 0; 0 - 0]×[0 - 0; 0 - 0; 0 - 3] = [0; -9; 0]
BCB1_Visible := N_BCB1*PVr = -49.4801
X := transpose([x_a, x_b, x_c, x_a, x_d, x_e, x_b, x_e, x_f, x_c, x_f, x_d])
Y := -transpose([y_a, y_b, y_c, y_a, y_d, y_e, y_b, y_e, y_f, y_c, y_f, y_d])
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# 3. с удалением невидимых граней | 2. без удаления невидимых граней
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