# Задать координаты вершин пирамиды и положения камеры в МСК:
# A B C D
PV := [10; 70; 110]
PIR := [5, 0, 0, 0; 0, 0, 5, 0; 0, 0, 0, 10; 1, 1, 1, 1]
# Получаем сферические координаты точки наблюдения:
r_v := PV[0] = 10
ϕ_v := PV[1]*π/180 = 1.22173
θ_v := PV[2]*π/180 = 1.91986
# Задаем положение секущей плоскости в МСК XYZ
# -угол между осью z и вектором нормали к секущей плоскости
ϕ_grad := 50
ϕ := ϕ_grad/180*π
ϕ = 0.872665
# - вектор нормали к секущей плоскости
N := transpose([0, sin(ϕ), cos(ϕ)])
# - координаты точки пересечения оси Z и секущей плоскости
x_0 := 0
y_0 := 0
h := 3/4
z_0 := h*max(PIR)
z_0 = 7.5
# Задаем параметры уравнения секущей плоскости
[A; B; C] := N
[A; B; C] = [0; 0.766044; 0.642788]
D := -(A*x_0 + B*y_0 + C*z_0)
D = -4.82091
# Находим точку пересечения P1 секущей плоскости с ребром AD
[x1; y1; z1] := submatrix(PIR, 0, 2, 0, 0) = [5; 0; 0]
[x2; y2; z2] := submatrix(PIR, 0, 2, 3, 3) = [0; 0; 10]
Δx := x2 - x1
Δy := y2 - y1
Δz := z2 - z1
t_AD := -((A*x1 + B*y1 + C*z1 + D)/(A*Δx + B*Δy + C*Δz)) = 0.75
# - параметр, при котором ребро и плоскость имеют общую точку. Если между 0 и 1, то ребро пересекает плоскость
x_AD := x1 + Δx*t_AD
y_AD := y1 + Δy*t_AD
z_AD := z1 + Δz*t_AD
x_AD = 1.25
y_AD = 0
z_AD = 7.5  # - координаты точки пересечения Р1
# Находим точку пересечения P2 секущей плоскости с ребром CD
V1 := submatrix(PIR, 0, 2, 2, 2) = [0; 5; 0]
V2 := submatrix(PIR, 0, 2, 3, 3) = [0; 0; 10]
ΔV := V2 - V1
t_CD := -((N*V1 + D)/(N*ΔV))
V_CD := V1 + ΔV*t_CD
x_CD := V_CD[0] = 0
y_CD := V_CD[1] = 3.09312
z_CD := V_CD[2] = 3.81377  # - координаты точки пересечения Р2
# Находим точку пересечения P3 секущей плоскости с ребром BD
V1 := submatrix(PIR, 0, 2, 1, 1) = [0; 0; 0]
V2 := submatrix(PIR, 0, 2, 3, 3) = [0; 0; 10]
ΔV := V2 - V1
t_BD := -((N*V1 + D)/(N*ΔV))
V_BD := V1 + ΔV*t_BD
x_BD := V_BD[0] = 0
y_BD := V_BD[1] = 0
z_BD := V_BD[2] = 7.5  # - координаты точки пересечения Р3
# Получаем матрицу мировых коорднат точек P1, P2, P3
TR := [x_AD, x_CD, x_BD; y_AD, y_CD, y_BD; z_AD, z_CD, z_BD; 1, 1, 1]
# Задаем область отображения графика в окне Windows
x_LW := 100
y_LW := 200  # – левый верхний угол области отображения
x_HW := 800
y_HW := 900  # – правый нижний угол области отображения
# Формируем матрицу пересчета мировых координат в видовые
K_view := [
    -sin(ϕ_v), cos(ϕ_v), 0, 0;
    -cos(θ_v)*cos(ϕ_v), -cos(θ_v)*sin(ϕ_v), sin(θ_v), 0;
    -sin(θ_v)*cos(ϕ_v), -sin(θ_v)*sin(ϕ_v), -cos(θ_v), r_v;
    0, 0, 0, 1
]
# Вычисляем координаты вершин пирамиды в видовой системе координат (ВСК)
PIR_V := K_view*PIR
# Вычисляем координаты вершин треугольника сечения Р1,
# Р2, Р3 в видовой системе координат (ВСК)
TR_V := K_view*TR
# Определяем координаты проекции вершин пирамиды на картинную плоскость
P_XY := stack(transpose(transpose(PIR_V)[:, 0]), transpose(transpose(PIR_V)[:, 1]), transpose(transpose(PIR_V)[:, 3]))
# Определяем координаты проекции вершин треугольника сечения Р1,
# Р2, Р3 на картинную плоскость
TR_XY := stack(transpose(transpose(TR_V)[:, 0]), transpose(transpose(TR_V)[:, 1]), transpose(transpose(TR_V)[:, 3]))
# Определяем габаритную область проекции пирамиды на плоскость XY ВСК – картинную плоскость
x_L := min(transpose(P_XY)[:, 0])
y_H := max(transpose(P_XY)[:, 1])
# – левый верхний угол
x_L = -4.69846
y_H = 9.39693
x_H := max(transpose(P_XY)[:, 0])
y_L := min(transpose(P_XY)[:, 1])
# – правый нижний угол
x_H = 1.7101
y_L = 0
# Вычисляем параметры, необходимые для формирования матрицы пересчета координат из плоскости XY ВСК в ОК
Δx_W := x_HW - x_LW
Δx_W = 700
Δx := x_H - x_L
Δx = 6.40856
Δy_W := y_HW - y_LW
Δy_W = 700
Δy := y_H - y_L
Δy = 9.39693
k_x := Δx_W/Δx
k_x = 109.229
k_y := Δy_W/Δy
k_y = 74.4924
T_SW := [k_x, 0, x_LW - k_x*x_L; 0, -k_y, y_HW + k_y*y_L; 0, 0, 1]  # – матрица пересчета из ВСК в ОК
# Вычисляем оконные координаты вершин пирамиды
M_W := T_SW*P_XY
[x_a, x_b, x_c, x_d; y_a, y_b, y_c, y_d; q, q, q, q] := vectorize(round(M_W)) = [100, 613, 800, 613; 856, 900, 780, 200; 1, 1, 1, 1]
# Формируем массивы координат X и Y для рисования пирамиды
X := transpose([x_a, x_b, x_c, x_a, x_d, x_b, x_d, x_c])
Y := transpose([y_a, y_b, y_c, y_a, y_d, y_b, y_d, y_c])
# Вычисляем оконные координаты вершин
# треугольника сечения Р1, Р2, Р3
TR_W := T_SW*TR_XY
[x_p1, x_p2, x_p3; y_p1, y_p2, y_p3; q, q, q] := vectorize(round(TR_W)) = [485, 729, 613; 364, 559, 375; 1, 1, 1]
# Формируем массивы координат Х и У для рисования
# сечения пирамиды
XC := transpose([x_p1, x_p2, x_p3, x_p1])
YC := transpose([y_p1, y_p2, y_p3, y_p1])
# Вычисляем декартовы координаты камеры (вектора,
# определяющего положение камеры)
R_C := [r_v*sin(θ_v)*cos(ϕ_v); r_v*sin(θ_v)*sin(ϕ_v); r_v*cos(θ_v)] = [3.21394; 8.83022; -3.4202]
A := [PIR[:, 0][0]; PIR[:, 0][1]; PIR[:, 0][2]] = [5; 0; 0]
B := [PIR[:, 1][0]; PIR[:, 1][1]; PIR[:, 1][2]] = [0; 0; 0]
C := [PIR[:, 2][0]; PIR[:, 2][1]; PIR[:, 2][2]] = [0; 5; 0]
D := [PIR[:, 3][0]; PIR[:, 3][1]; PIR[:, 3][2]] = [0; 0; 10]
AB := B - A = [-5; 0; 0]
AC := C - A = [-5; 5; 0]
AD := D - A = [-5; 0; 10]
BD := D - B = [0; 0; 10]
BC := C - B = [0; 5; 0]
CD := D - C = [0; -5; 10]
Nabc := BC×AC = [0; 0; 25]
Nabd := BD×AB = [0; -50; 0]
Nacd := AC×AD = [50; 50; 25]
Nbcd := CD×BD = [-50; 0; 0]
q1 := R_C*Nabc/(|R_C|*|Nabc|) = -0.34202
q2 := R_C*Nabd/(|R_C|*|Nabd|) = -0.883022
q3 := R_C*Nacd/(|R_C|*|Nacd|) = 0.688937
q4 := R_C*Nbcd/(|R_C|*|Nbcd|) = -0.321394
# Видимыми будут грани ABC и ACD.
X1 := transpose([x_b, x_d, x_a, x_b, x_c, x_d])
Y1 := transpose([y_b, y_d, y_a, y_b, y_c, y_d])
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