# A B C D E F | БАЗА
# Задаем координаты вершин пирамиды и положения камеры: | 1. что переделать (в соотв. с заданием?)
# а. пирамида с гранями
# б. пирамида без граней
PIR := [0, 0, 3, 0, 0, 1; 3, 0, 0, 1, 0, 0; 0, 0, 0, 3, 3, 3; 1, 1, 1, 1, 1, 1]
PV := [10; 115; 45]  # горизонтальный угол  # в. сечение без гарней
# вертикальный угол | г. в другие координаты ОСК
# 2. что спрашивали (повернуть на угол, ..)
# Получаем сферические координаты точки наблюдения:
r_v := PV[0] = 10
ϕ_v := PV[1]*π/180 = 2.00713
θ_v := PV[2]*π/180 = 0.785398
# Задаем положение секущей плоскости в МСК XYZ
# -угол между осью z и вектором нормали к секущей плоскости
ϕ_grad := 50
ϕ := ϕ_grad/180*π
ϕ = 0.872665  # МСК -> ВСК -> ОСК
# - вектор нормали к секущей плоскости
N := transpose([0, sin(ϕ), cos(ϕ)])
# - координаты точки пересечения оси Z и секущей плоскости
x_0 := 0
y_0 := 0
# вершина D
Z
z_0 := 3/4*PIR[:, 3][2]
3/4  # высота сечения  # почему именно PIR 3 2? (4-ый столбец, 3-ья строка = 3)
z_0 = 2.25
-макс*Z
# Задаем параметры уравнения секущей плоскости
[A; B; C] := N
[A; B; C] = [0; 0.766044; 0.642788]  # здесь А = 0, B = sinф, C = cosф
# по формуле
D := -(A*x_0 + B*y_0 + C*z_0)
D = -1.44627  # сечения как то связаны с перспективными преобразованиями?
# что значит параметр t?
# Находим точку пересечения P1 секущей плоскости с ребром AD
# параметры субматрикса:
# 1. с какой строки берем
# 2. до какой сстроки берем
# 3. с какого столбца берем
# 4. до какого столбца берем
[x1; y1; z1] := submatrix(PIR, 0, 2, 0, 0) = [0; 3; 0]
[x2; y2; z2] := submatrix(PIR, 0, 2, 3, 3) = [0; 1; 3]
Δx := x2 - x1
Δy := y2 - y1
Δz := z2 - z1
t_AD1 := -((A*x1 + B*y1 + C*z1 + D)/(A*Δx + B*Δy + C*Δz)) = -2.14968
# - параметр, при котором ребро и плоскость имеют общую точку. Если между 0 и 1, то ребро пересекает плоскость
# почему tAD = -2.3 а tAD = 0.3?
t_AD := 0.3
# откуда вообще взялся параметр 0.3 для tAD?
x_AD := x1 + Δx*t_AD
y_AD := y1 + Δy*t_AD
z_AD := z1 + Δz*t_AD
x_AD = 0
y_AD = 2.4
z_AD = 0.9  # - координаты точки пересечения Р1
# Находим точку пересечения P2 секущей плоскости с ребром CF
# 3 столбец - точка C
V1 := submatrix(PIR, 0, 2, 2, 2) = [3; 0; 0]
V2 := submatrix(PIR, 0, 2, 5, 5) = [1; 0; 3]  # 6 столбец - точка F
ΔV := V2 - V1  # дельта V - сама прямая CF
t_CF := -((N*V1 + D)/(N*ΔV))
# и откуда эти формулы интеерсно
V_CF := V1 + ΔV*t_CF
x_CF := V_CF[0]
y_CF := V_CF[1]
z_CF := V_CF[2]  # - координаты точки пересечения Р2
# Находим точку пересечения P3 секущей плоскости с ребром BE
V1 := submatrix(PIR, 0, 2, 1, 1) = [0; 0; 0]
V2 := submatrix(PIR, 0, 2, 4, 4) = [0; 0; 3]
ΔV := V2 - V1  # опять второй вариант нахождения точек пересечения
t_BE := -((N*V1 + D)/(N*ΔV))
V_BE := V1 + ΔV*t_BE
x_BE := V_BE[0] = 0
y_BE := V_BE[1] = 0
z_BE := V_BE[2] = 2.25  # - координаты точки пересечения Р3
# Получаем матрицу мировых коорднат точек P1, P2, P3
TR := [x_AD, x_CF, x_BE; y_AD, y_CF, y_BE; z_AD, z_CF, z_BE; 1, 1, 1]
# Задаем область отображения графика в окне Windows
x_LW := 200
y_LW := 100  # – левый верхний угол области отображения
x_HW := 700
y_HW := 500  # – правый нижний угол области отображения
# Формируем матрицу пересчета мировых координат в видовые
K_view := [
    -sin(ϕ_v), cos(ϕ_v), 0, 0;
    -cos(θ_v)*cos(ϕ_v), -cos(θ_v)*sin(ϕ_v), sin(θ_v), 0;
    -sin(θ_v)*cos(ϕ_v), -sin(θ_v)*sin(ϕ_v), -cos(θ_v), r_v;
    0, 0, 0, 1
]  # r.v это первый параметр камеры (10)
# Вычисляем координаты вершин пирамиды в видовой системе координат (ВСК)
PIR_V := K_view*PIR
# Вычисляем координаты вершин треугольника сечения Р1,
# Р2, Р3 в видовой системе координат (ВСК)
TR_V := K_view*TR
# Определяем координаты проекции вершин пирамиды на картинную плоскость
P_XY := stack(transpose(transpose(PIR_V)[:, 0]), transpose(transpose(PIR_V)[:, 1]), transpose(transpose(PIR_V)[:, 3])) = [
    -1.26785, 0, -2.71892, -0.422618, 0, -0.906308;
    -1.92257, 0, 0.896509, 1.48046, 2.12132, 2.42016;
    1, 1, 1, 1, 1, 1
]
# Определяем координаты проекции вершин треугольника сечения Р1,
# Р2, Р3 на картинную плоскость
# картинная плоскость — плоскость на которую проецируется объект
TR_XY := stack(transpose(transpose(TR_V)[:, 0]), transpose(transpose(TR_V)[:, 1]), transpose(transpose(TR_V)[:, 3])) = [-1.01428, -1.35946, 0; -0.901659, 2.03924, 1.59099; 1, 1, 1]
# Определяем габаритную область проекции пирамиды на плоскость XY ВСК – картинную плоскость
x_L := min(transpose(P_XY)[:, 0])
y_H := max(transpose(P_XY)[:, 1])
# – левый верхний угол
x_L = -2.71892
y_H = 2.42016
x_H := max(transpose(P_XY)[:, 0])
y_L := min(transpose(P_XY)[:, 1])
# – правый нижний угол
x_H = 0
y_L = -1.92257
# Вычисляем параметры, необходимые для формирования матрицы пересчета координат из плоскости XY ВСК в ОК
Δx_W := x_HW - x_LW
Δx_W = 500
Δx := x_H - x_L
Δx = 2.71892
Δy_W := y_HW - y_LW
Δy_W = 400
Δy := y_H - y_L
Δy = 4.34273
k_x := Δx_W/Δx
k_x = 183.896
k_y := Δy_W/Δy
k_y = 92.1081
T_SW := [k_x, 0, x_LW - k_x*x_L; 0, -k_y, y_HW + k_y*y_L; 0, 0, 1] = [183.896, 0, 700; 0, -92.1081, 322.916; 0, 0, 1]  # – матрица пересчета из ВСК в ОК
# Вычисляем оконные координаты вершин пирамиды
M_W := T_SW*P_XY
[x_a, x_b, x_c, x_d, x_e, x_f; y_a, y_b, y_c, y_d, y_e, y_f; q, q, q, q, q, q] := vectorize(round(M_W)) = [467, 700, 200, 622, 700, 533; 500, 323, 240, 187, 128, 100; 1, 1, 1, 1, 1, 1]
# Формируем массивы координат X и Y для рисования пирамиды
X := transpose([x_a, x_b, x_c, x_a, x_d, x_e, x_b, x_e, x_f, x_c, x_f, x_d])
Y := -transpose([y_a, y_b, y_c, y_a, y_d, y_e, y_b, y_e, y_f, y_c, y_f, y_d])
# Вычисляем оконные координаты вершин
# треугольника сечения Р1, Р2, Р3
TR_W := T_SW*TR_XY
[x_p1, x_p2, x_p3; y_p1, y_p2, y_p3; q, q, q] := vectorize(round(TR_W)) = [513, 450, 700; 406, 135, 176; 1, 1, 1]
# Формируем массивы координат Х и У для рисования
# сечения пирамиды
XC := transpose([x_p1, x_p2, x_p3, x_p1])
YC := -transpose([y_p1, y_p2, y_p3, y_p1])
# Вычисляем декартовы координаты камеры (вектора,
# определяющего положение камеры)
R_C := [r_v*sin(θ_v)*cos(ϕ_v); r_v*sin(θ_v)*sin(ϕ_v); r_v*cos(θ_v)] = [-2.98836; 6.40856; 7.07107]  # а декартовы коорды камеры надо чекнуть
X1 := transpose([x_e, x_b, x_c, x_f, x_e, x_d, x_f, x_c, x_a, x_d])
Y1 := -transpose([y_e, y_b, y_c, y_f, y_e, y_d, y_f, y_c, y_a, y_d])
# E | D
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A
# для 5 задания надо прост опоменять коорды в ОСК на 100 200 800 900?
C
B
